a_1 := 10
σ_1 := 0.5
x_1 := 10
a_2 := 15
σ_2 := 2
x_2 := 25
a_3 := 10
σ_3 := 5
x_3 := 35
f(x) := a_1/(sqrt(2*π)*σ_1)*e^(-|(x - x_1)/(2*σ_1)|) + a_2/(sqrt(2*π)*σ_2)*e^(-(x - x_2)^2/(2*σ_2^2)) + a_3/(sqrt(2*π)*σ_3)*e^(-(x - x_3)^2/(2*σ_3^2))
L := 120
N := 60
Δ := L/N
i := 1 .. N
x[i] := -L/2 + i*Δ
fi[i] := f(x[i])
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σ_R := 2
η(x) :=
    1 if x < 0
    1 otherwise
Rf(τ) := 1/(sqrt(2*π)*σ_R)*e^(-1/2*(τ/σ_R)^2)*η(τ)
fm(x) := integral(f(τ)*Rf(x - τ), τ = x*(-4)*σ_R .. x) + integral(f(τ)*Rf(x - τ), τ = x .. x + 4*σ_R)
I[i] := fm(x[i])
integral(Rf(τ), τ = -4*σ_R .. 4*σ_R) = 0.999937
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I_ω := cfft(I)
f_ω := cfft(fi)
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Rfi[i] := Rf(x[i])
F_R := cfft(Rfi)
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filt(I, R) :=
    I/R if |R| > 10^-6
    0 otherwise
a[i] := filt(I_ω[i], F_R[i])
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ar := 1/(4*sqrt(π))*icfft(a)
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# [component: outputs SpEi36]
# [component: outputs mon1]
# [component: outputs SpEi64]
# [component: outputs mon2]
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max(mon2[:, 0]) = 500.139
cs := cspline(mon1[:, 0], mon1[:, 1])
st := 0.35
e_min := 50
e_max := 80
Np := floor((e_max - e_min)/st)
Np = 85
k := 0 .. Np - 1
mon1 = [
    10.005, 0, 0;
    10.015, 360.466, 189.859;
    10.025, 170.801, 130.691;
    10.035, 170.25, 130.48;
    10.045, 198.484, 140.884;
    10.055, 140.347, 118.468;
    10.065, 268.595, 163.889;
    10.075, 168.041, 129.631;
    10.085, 223.017, 149.338;
    10.095, 311.431, 176.474
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]
En1[k] := e_min + st*k
e1_min := 25
e1_max := 50
st1 := (e1_max - e1_min)/(Np - 1)
En2[k] := e1_min + st1*k
k1 := 0 .. Np - 1
R1 := linterp(mon1[:, 0], mon1[:, 1], En1)
R2 := interp(cs, mon1[:, 0], mon1[:, 1], En2)
Ir1 := (mon1[1, 0] - mon1[0, 0])*sum(R1)
Ir2 := (mon1[1, 0] - mon1[0, 0])*sum(R2)
Ir1 = 6031.4
Ir2 = 6219.55
R1 := R1/Ir1
R2 := R2/Ir2
Spr := linterp(SpEi64[:, 0], SpEi64[:, 1], En1 - 63.595)
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IS_ω := cfft(Spr)
Ns := length(IS_ω)
Ns = 85
sR_1 := cfft(R1)
length(sR_1) = 85
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Sf[k1] := IS_ω[k1]/sR_1[k1]
fi := icfft(Sf)
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